# AguaClara Water Treatment Plants
# Design References
# MathCAD dimension calculations:
# Variable Naming Guide
# The list below is the list names that can be used before the period for the subscript in our variable names.
# Major Plant Components. These items follow the period in the variable name
# [reference: BasicInputs.xmcd]
Q_Plant := 32*L/s
# [reference: ExpertInputs.xmcd]
# [reference: MathFunctions.xmcd]
# [reference: PipeDatabase.xmcd]
# [reference: FluidsFunctions.xmcd]
# [reference: SedimentationTank.xmcd]
# [reference: Flocculator.xmcd]
# [reference: LFOM.xmcd]
[
    "Subscripts", "";
    "component key", "Description";
    "Et", "Entrance tank";
    "Lfom", "Linear flow orifice meter";
    "Rm", "Rapid mix";
    "Floc", "Flocculation tank";
    "Sed", "Sedimentation tank";
    "Fi", "Stacked Rapid Sand Filter"
]
# [reference: LinearCdc.xmcd]
# [reference: ChemStorageTanks.xmcd]
# [reference: EntranceTank.xmcd]
# [reference: StackedRapidSandFilter.xmcd]
# [reference: DrainChannel.xmcd]
# [reference: MaterialsList.xmcd]
# AutoCAD drawing programs:
# Translators:
# These are the codes that take MathCAD outputs and create AutoCAD scripts that are used to draw the plant (formerly Basics)
# [reference: MtoATranslators.xmcd]
# The wrapped MtoA translator contains the functions that the user will want to access. These functions will draw pieces with full functionality - specifying the location, dimension, and orientation of the object. Also, it contains layer control and subtraction capabilities for grouped objects.
# [reference: MtoATranslatorsWrapped.xmcd]
[
    "Symbol", "Description", "Dimensions";
    "Amp", "amplitude", "L";
    "B", "perpendicular distance between components (center to center)", "L";
    "D", "Diameter", "L";
    "E", "pipe roughness", "L";
    "FB", "Freeboard", "L";
    "H", "height (includes freeboard)", "L";
    "HL", "head loss", "L";
    "HW", "local water depth", "L";
    "ID", "inner diameter", "L";
    "L", "length", "L";
    "Loc", "Locations", "L";
    "ND", "nominal diameter", "L";
    "OD", "outer diameter", "L";
    "R", "Radius", "L";
    "S", "space between components", "L";
    "T", "thickness", "L";
    "W", "width", "L";
    "Z", "elevation relative to bottom of sed tank", "L";
    "ZW", "water depth relative to bottom of sed tank", "L";
    "V", "velocity", "L/T";
    "CP", "Collision Potential", "L^(2/3)";
    "A", "Area", "L^2";
    "Nu", "kinematic viscosity", "L^2/T";
    "ED", "energy dissipation rate", "L^2/T^3";
    "Vol", "volume", "L^3";
    "Q", "flow", "L^3/T";
    "MW", "Molecular weight", "M";
    "C", "Concentration", "M/L^3";
    "Rho", "Density", "M/L^3";
    "AN", "angle", "radians";
    "Ti", "time", "T";
    "EN", "Enumerated type", "dimensionless";
    "N", "Number", "dimensionless";
    "Pi", "dimensionless geometric ratio", "";
    "AC", "AutoCAD command string", "";
    "K", "minor loss coefficient", ""
]
# Plant Elements:
# These are all of the files that draw the fundamental parts of the plants (tees, elbows, tanks, pipes, etc)
# [reference: ChannelF.xmcd]
# [reference: PlumbingF.xmcd]
# [reference: TankF.xmcd]
# [reference: StairsF.xmcd]
# [reference: DrainChannelF.xmcd]
# Specific Pieces:
# These are the codes that draw the bigger pieces of the plant (the sed tank, floc tank, etc)
# [reference: FlocculatorAC.xmcd]
# [reference: SedimentationTankAC.xmcd]
# [reference: EntranceTankAC.xmcd]
# [reference: ChemStockTanksACvlk24.xmcd]
# [reference: StackedRapidSandFilterAC.xmcd]
# [reference: OperatorAccessACvlk24.xmcd]
# [reference: DrainChannelAC.xmcd]
# [reference: CdcAC.xmcd]
# AutoCAD Materials:
# Adds the option of assigning materials to the entire plant design.
# [reference: MaterialsAC.xmcd]
# Layouts:
# This rearranges the plant to optimize the layout
# [reference: PlantLayoutsAC.xmcd]
# This file will execute at the very end to create multiple views of the entire plant in paperspace
# [reference: LayoutsAC.xmcd]
# Sedimentation
# Sed Tanks and Slopes:
N_SedTanks = 3
L_Sed = 6.40157 m
N_SedBays = 2  # Number of bays of inlet manifolds in each sed tank
# Length of the port through which water exits the inlet manifold
# Width of ferrous cement plates in whice one manifold port is cut
Q_SedBay = 5.33333 L/s
# Sedimentation Tank Sludge Drain:
N_SedSludgeOrifices = 48  # per cell
Ti_SludgeDrain = 30 min  # Tank Drain time
W_SedSludge = 9.19761 cm  # Width of the sludge channel
B_SedSludgeOrifices = 11.0678 cm  # Distance center to center between drain orifices
# Depth of the sludge channel
H_SedSludge = 9.19761 cm
W_SedDrainCover = 13.1976 cm
D_SedSludgeOrifice = 0.00924124 m  # Diameter of drain orifices
N_SedSludgeOrifices = 48
# Sedimentation Tank Dimensions:
Z_SedSludge = 0.0919761 m  # Height from 0 of the top of the sludge drain
# Height from 0 of the top of the inlet manifold
W_Sed = 2 m
L_Sed = 6.40157 m  # Total tank length
# Inlet Channel:
HW_SedInletChannel = 0.38815 m  # Width of the drop chimneys connecting channel to sed inlet manifolds
W_SedInletChannel = 0.578538 m  # length of drop chimmneys
L_SedChannel = 6.3 m
H_SedInletChannel = 0.48815 m
# Sedimentation Tank Effluent Launder:
N_SedLaunderOrifices = 100  # Number of orifices per launder  # More Launder Dimensions
ND_SedLaunder = 6 in
Q_SedLaunderOrifices = 5.33333e-5 m^3/s
# Center to center launder spacing
L_SedLaunder = 5.19482 m
B_SedLaunderOrifices = 0.1 m
D_SedLaunderOrifice = 0.433071 in
# Exit Channel:
W_SedExitChannel = 0.3485 m
H_SedExitChannel = 0.48815 m
HW_SedExitChannel = 0.34815 m  # water height in exit channel from 0
# Lamella:
L_SedPlate = 1 m  # center to center distance between lamella
B_SedPlate = 2.7 cm  # spacing between lamella
S_SedPlate = 2.5 cm
N_SedPlates = 165  # Number of Sed Plates per Sedimentation Tank Bay.
AN_SedPlate = 60 deg
V_SedC = 5.96405 m/day
L_SedActive = 5.14188 m
V_SedUp = 86.4 m/day
Z_SedLaunder = 2.14156 m
N_SedPlates = 165
HW_Sed = 2.26615 m
H_Sed = 2.38551 m
# Flocculator
# Look at Flocculator Positioning arrays
W_FlocChannel = 0.6 m
# Fill last channel with bafffles from last channel
ED_Floc = 10 mW/kg
# Fix port width to be based on energy dissipation in that channel
# Adjust spacing after the number of baffles per channel is known.
HW_FlocEnd = 2.26615 m
# Check the residence time of the flocculator should be at least 20minutes
X_FlocBaffles = [
    0.307253, 0.307253, 0.307253, 0.307253;
    0.596506, 0.596506, 0.596506, 0.596506;
    0.885759, 0.885759, 0.885759, 0.885759;
    1.17501, 1.17501, 1.17501, 1.17501;
    1.46427, 1.46427, 1.46427, 1.46427;
    1.75352, 1.75352, 1.75352, 1.75352;
    2.04277, 2.04277, 2.04277, 2.04277;
    2.33202, 2.33202, 2.33202, 2.33202;
    2.62128, 2.62128, 2.62128, 2.62128;
    2.91053, 2.91053, 2.91053, 2.91053;
    3.19978, 3.19978, 3.19978, 3.19978;
    3.48904, 3.48904, 3.48904, 3.48904;
    3.77829, 3.77829, 3.77829, 3.77829;
    4.06754, 4.06754, 4.06754, 4.06754;
    4.3568, 4.3568, 4.3568, 4.3568;
    4.64605, 4.64605, 4.64605, 4.64605;
    4.9353, 4.9353, 4.9353, 4.9353;
    5.22455, 5.22455, 5.22455, 5.22455;
    5.51381, 5.51381, 5.51381, 5.51381;
    0, 0, 0, 5.80306
] m
L_FlocBaffles = [
    1.83527, 1.83527, 1.83527, 2.17;
    2.17, 2.17, 2.17, 1.83527;
    1.83527, 1.83527, 1.83527, 2.17;
    2.17, 2.17, 2.17, 1.83527;
    1.83527, 1.83527, 1.83527, 2.17;
    2.17, 2.17, 2.17, 1.83527;
    1.83527, 1.83527, 1.83527, 2.17;
    2.17, 2.17, 2.17, 1.83527;
    1.83527, 1.83527, 1.83527, 2.17;
    2.17, 2.17, 2.17, 1.83527;
    1.83527, 1.83527, 1.83527, 2.17;
    2.17, 2.17, 2.17, 1.83527;
    1.83527, 1.83527, 1.83527, 2.17;
    2.17, 2.17, 2.17, 1.83527;
    1.83527, 1.83527, 1.83527, 2.17;
    2.17, 2.17, 2.17, 1.83527;
    1.83527, 1.83527, 1.83527, 2.17;
    2.17, 2.17, 2.17, 1.83527;
    1.83527, 1.83527, 1.83527, 2.17;
    0, 0, 0, 1.83527
] m
Z_FlocBaffles = [
    0, 0, 0, 0.43088;
    0.43088, 0.43088, 0.43088, 0;
    0, 0, 0, 0.43088;
    0.43088, 0.43088, 0.43088, 0;
    0, 0, 0, 0.43088;
    0.43088, 0.43088, 0.43088, 0;
    0, 0, 0, 0.43088;
    0.43088, 0.43088, 0.43088, 0;
    0, 0, 0, 0.43088;
    0.43088, 0.43088, 0.43088, 0;
    0, 0, 0, 0.43088;
    0.43088, 0.43088, 0.43088, 0;
    0, 0, 0, 0.43088;
    0.43088, 0.43088, 0.43088, 0;
    0, 0, 0, 0.43088;
    0.43088, 0.43088, 0.43088, 0;
    0, 0, 0, 0.43088;
    0.43088, 0.43088, 0.43088, 0;
    0, 0, 0, 0.43088;
    0, 0, 0, 0
] m
N_FlocChannels = 4
L_FlocTank = 25.6063 m
HL_Floc = 28.473 cm
HW_FlocStart = 2.55088 m
S_FlocBaffle = [28.7253; 28.7253; 28.7253; 28.7253] cm
B_FlocBaffle = [28.9253; 28.9253; 28.9253; 28.9253] cm
N_FlocChannelBaffles = [19; 19; 19; 20]
W_FlocPort = [0.287253; 0.287253; 0.287253; 0.287253] m
HL_FlocChannels = [7.03036; 7.03036; 7.03036; 7.38188] cm
L_FlocBaffleLower = 1.83527 m
L_FlocBaffleUpper = 2.17 m
H_FlocPort = [0.6; 0.6; 0.6; 0.6] m
Ti_Floc = 18.1337 min  # residence time of the flocculator
N_FlocBaffles = 77
# Materials List
N_Valves = 6
N_ValveCouplings = 6
N_SedPlatesTotal = 990
N_SedPlatesPerSheet = 3
N_SedPlateSheets = 330
# AutoCAD Scripts
AC_SedTank =  # no stored result
AC_EntranceTank =  # no stored result
AC_FlocTank = [
    "-layer m FlocTankCon"; "c t 132,132,132"; "FlocTankCon"; "  "; "_-view o t _zoom w 0.16,6.29,0 -6.56157,9.46,2.65088 _box 0,6.45,0 -6.40157,9.3,2.65088 _box 0.15,6.3,-0.15 -6.55157,9.45,2.65088 _subtract 0.15,6.3,-0.15  0,6.45,0 "; "_box -6.55157,7.05,0 0.15,7.2,2.65088"; "-array l  R 3 1 0.75"; "-group c FlocTankCon y "; "all "; "-layer s 0"
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]
AC_ChemTanks = [
    "-layer m CoagTanks"; "c t 132,132,132"; "CoagTanks"; "  "; "_-view o t"; "_zoom w -8.68322,10.90658,2.20147 -7.69322,11.89657,3.32647"; "_cylinder -8.18822,11.40158,3.31647 0.485 a -9.29322,11.40158,3.31647"; "rotate3d l  y -8.18822,11.40158,3.31647 90"; "-group c CoagTanks y "; "all "
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]
AC_OperatorAccess =  # error: This variable is undefined.
AC_DrainChannel = [
    "-layer m DC"; "c t 214,214,214"; "DC"; "  "; "3dpoly"; "0.2,10.95,1.76835"; "0.2,10.95,1.38794"; "0.2,11.71081,1.38794"; "0.2,11.71081,1.76835"; "0.2,10.95,1.76835 "
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]
AC_Layout = [
    "laythw"; "-layout t AguaClara 0"; "View"; "layout d Layout1"; " d Layout2"; "layout r View"; "TopView"; "layout s TopView"; ".ms"; "z o all "
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]
AC_MatApply = ["-insert MaterialsInsert"; "0,0,0 x 1 1  0"]
AC_Filter =  # no stored result
AC_Cdc =  # error
# [component: inputs AC_Filter]
